*Heading
** Job name: Tradi-Umat Model name: Model-1
** Generated by: Abaqus/CAE 2021
*Preprint, echo=NO, model=NO, history=NO, contact=NO
**
** PARTS
**
*Part, name=Part-1
*Node
      1,           1.,           1.,           1.
      2,           1.,           0.,           1.
      3,           1.,           1.,           0.
      4,           1.,           0.,           0.
      5,           0.,           1.,           1.
      6,           0.,           0.,           1.
      7,           0.,           1.,           0.
      8,           0.,           0.,           0.
*Element, type=C3D8
1, 5, 6, 8, 7, 1, 2, 4, 3
*Nset, nset=_PickedSet2, internal, generate
 1,  8,  1
*Elset, elset=_PickedSet2, internal
 1,
** Section: Section-1
*Solid Section, elset=_PickedSet2, material=Material-1
,
*End Part
**
**
** ASSEMBLY
**
*Assembly, name=Assembly
**
*Instance, name=Part-1-1, part=Part-1
*End Instance
**
*Nset, nset=Set-1, instance=Part-1-1
 1, 2, 5, 6
*Elset, elset=Set-1, instance=Part-1-1
 1,
*Nset, nset=_PickedSet7, internal, instance=Part-1-1, generate
 5,  8,  1
*Elset, elset=_PickedSet7, internal, instance=Part-1-1
 1,
*Nset, nset=_PickedSet8, internal, instance=Part-1-1, generate
 2,  8,  2
*Elset, elset=_PickedSet8, internal, instance=Part-1-1
 1,
*Nset, nset=_PickedSet9, internal, instance=Part-1-1
 3, 4, 7, 8
*Elset, elset=_PickedSet9, internal, instance=Part-1-1
 1,
*Nset, nset=_PickedSet12, internal, instance=Part-1-1
 1, 2, 5, 6
*Elset, elset=_PickedSet12, internal, instance=Part-1-1
 1,
*Nset, nset=_PickedSet13, internal, instance=Part-1-1
 3, 4, 7, 8
*Elset, elset=_PickedSet13, internal, instance=Part-1-1
 1,
*End Assembly
*Amplitude, name=Amp-05
             0.,              0.,              5.,              1.,             15.,             -1.,             25.,              1.
            35.,             -1.,             45.,              1.,             55.,             -1.,             65.,              1.
            75.,             -1.,             85.,              1.,             95.,             -1.,            105.,              1.
           115.,             -1.,            125.,              1.,            135.,             -1.,            145.,              1.
           155.,             -1.,            165.,              1.,            175.,             -1.,            185.,              1.
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          1995.,             -1.,           2005.,              1.
*Amplitude, name=Amp-10
             0.,              0.,              5.,              1.,             15.,             -1.,             25.,              1.
            35.,             -1.,             45.,              1.,             55.,             -1.,             65.,              1.
            75.,             -1.,             85.,              1.,             95.,             -1.,            105.,              1.
           115.,             -1.,            125.,              1.,            135.,             -1.,            145.,              1.
           155.,             -1.,            165.,              1.,            175.,             -1.,            185.,              1.
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          2395.,             -1.,           2405.,              1.
*Amplitude, name=Amp-hold
             0.,              0.,              7.,              1.,            507.,              1.,            521.,             -1.
           535.,              1.,           1035.,              1.,           1049.,             -1.,           1063.,              1.
          1563.,              1.,           1577.,             -1.,           1591.,              1.,           2091.,              1.
          2105.,             -1.,           2119.,              1.,           2619.,              1.,           2633.,             -1.
          2647.,              1.,           3147.,              1.,           3161.,             -1.,           3175.,              1.
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        422393.,             -1.,         422407.,              1.,         422907.,              1.
**
** MATERIALS
**
*Material, name=Material-1
*Depvar
     20,
*User Material, constants=18, unsymm
219147.,         0.3,      180.74,      10.512,     479.472,     520.395,     182.119,     4.31016
 7.02377e-08,      488.95,     7.04725,    0.959789,     0.19228,     0.19625,     23.1902,     3.47452
    -102.698,   -0.531663
*Time Points, name=TimePoints-1
0., 0.1, 0.2, 0.3, 0.4, 0.5, 0.6, 0.7
0.8, 0.9, 1., 1.1, 1.2, 1.3, 1.4, 1.5
1.6, 1.7, 1.8, 1.9, 2., 2.1, 2.2, 2.3
2.4, 2.5, 2.6, 2.7, 2.8, 2.9, 3., 3.1
3.2, 3.3, 3.4, 3.5, 3.6, 3.7, 3.8, 3.9
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2404.8, 2404.9, 2405.
**
** BOUNDARY CONDITIONS
**
** Name: BC-x Type: �Գ�/���Գ�/��ȫ�̶�
*Boundary
_PickedSet7, XSYMM
** Name: BC-y Type: �Գ�/���Գ�/��ȫ�̶�
*Boundary
_PickedSet8, YSYMM
** Name: BC-z Type: �Գ�/���Գ�/��ȫ�̶�
*Boundary
_PickedSet9, ZSYMM
** ----------------------------------------------------------------
**
** STEP: Step-1
**
*Step, name=Step-1, nlgeom=NO, inc=1000000000
*Static
0.5, 25., 1e-07, 1.
**
** BOUNDARY CONDITIONS
**
** Name: BC-10 Type: λ��/ת��
*Boundary, amplitude=Amp-05
_PickedSet12, 3, 3, 0.005
**
** OUTPUT REQUESTS
**
*Restart, write, frequency=0
**
** FIELD OUTPUT: F-Output-1
**
*Output, field, time interval=0.5
*Element Output, directions=YES
E, MISES, S, SDV
**
** HISTORY OUTPUT: LCF
**
*Output, history, time interval=0.5
*Element Output, elset=Set-1
E33, S33
*El Print, freq=1
S33, E33
*End Step
